solve block
    # guess values
    P0000 := 1
    P0001 := 1
    P0011 := 1
    P0021 := 1
    P0100 := 1
    P0111 := 1
    P0101 := 1
    q := 0.75
    p1 := 0.7
    p2 := 0.65
    P0121 := 1
    P2100 := 1
    P2101 := 1
    P2111 := 1
    P2121 := 1
    # constraints
    P0000 == P0000*q + P0001*q*(1 - p2)
    P0001 == P0001*q*p2 + P0011*q*(1 - p2) + P0100*q*(1 - p1) + P0101*q*(1 - p1)*(1 - p2)
    P0011 == P0011*q*p2 + P0021*q*(1 - p2) + P0101*q*(1 - p1)*p2 + P0111*q*(1 - p1)*(1 - p2)
    P0021 == P0021*q*p2 + P0011*q*(1 - p1)*p2 + P0121*(q*(1 - p1)*(1 - p2) + q*(1 - p1)*p2)
    P0100 == P0000*(1 - q) + P0001*(1 - q)*(1 - p2) + P0100*q*p1 + P0101*q*p1*(1 - p2)
    P0101 == P0001*(1 - q)*p2 + P0011*(1 - q)*(1 - p2) + P0100*(1 - q)*(1 - p1) + P0101*((1 - q)*(1 - p1)*(1 - p2) + q*p1*p2) + P0111*q*p1*(1 - p2) + P2100*(1 - p1) + P2101*(1 - p1)*(1 - p2)
    P0000 + P0001 + P0011 + P0021 + P0100 + P0101 + P0111 + P0121 + P2100 + P2101 + P2111 + P2121 == 1
    P0121 == P0021*(1 - q)*p2 + P0111*(1 - q)*(1 - p1)*p2 + P0121*(q*p1*p2 + (1 - p1)*(1 - p2) + (1 - q)*(1 - p1)*p2) + P2111*(1 - p1)*p2 + P2121*((1 - p1)*p2 + (1 - p1)*(1 - p2))
    P2100 == P0100*(1 - q)*p1 + P0101*(1 - q)*p1*(1 - p2) + P2100*p1 + P2101*p1*(1 - p2)
    P2101 == P0101*(1 - q)*p1*p2 + P0111*(1 - q)*p1*(1 - p2) + P2101*p1*p2 + P2111*p1*(1 - p2)
    P2111 == P0111*(1 - q)*p1*p2 + P0121*(1 - q)*p1*(1 - p2) + P2111*p1*p2 + P2121*p1*(1 - p2)
    P2121 == P0121*(1 - q)*p1*p2 + P2121*p1*p2
    # solver
    find(P0000, P0001, P0011, P0021, P0100, P0101, P0111, P0121, P2100, P2101, P2111, P2121) = [0.137694; 0.131138; 0.0700898; 0.0304276; 0.159787; 0.163269; 0.0515011; 0.023749; 0.164843; 0.0468984; 0.0156464; 0.00495679]
end solve block
